// SBML level 2 version 4

model cell()

  // Compartments:
  compartment compartment = 1;

  // Species:
  species Aart in compartment = 0;
  species Agut in compartment = 0;
  species Agutlumen in compartment = 1;
  species Alung in compartment = 0;
  species Aven in compartment = 0;
  species Arest in compartment = 0;
  species Aliver in compartment = 0;
  species Ametabolized in compartment = 0;
  species Akidney in compartment = 0;
  species Atubules in compartment = 0;

  // Parameters:
  Qgut = 14.11;
  Vart = 0.007222;
  kgutabs = 52.32;
  Qcardiac = 106.6;
  Vlung = 0.00119;
  Vven = 0.007222;
  Qrest = 76.34;
  Vrest = 0.1828;
  Rblood2plasma = 0.7949;
  Krest2pu = 174.7;
  Fraction_unbound_plasma = 0.2001;
  Qliver = 2.882;
  Clmetabolism = 0;
  Vliver = 0.008715;
  Kliver2pu = 454.5;
  Vgut = 0.006462;
  Qkidney = 13.25;
  Qgfr = 1.886;
  Vkidney = 0.001738;
  Kkidney2pu = 516.5;
  Klung2pu = 505.8;
  Kgut2pu = 316.1;

  // Reactions:
  J1: Aart => Agut; Qgut*Aart/Vart;
  J2: Agutlumen => Agut; kgutabs*Agutlumen;
  J3: Alung => Aart; Qcardiac*Alung/Vlung*Rblood2plasma/Klung2pu/Fraction_unbound_plasma;
  J4: Aven => Alung; Qcardiac*Aven/Vven;
  J5: Aart => Arest; Qrest*Aart/Vart;
  J6: Arest => Aven; Qrest*Arest/Vrest*Rblood2plasma/Krest2pu/Fraction_unbound_plasma;
  J7: Aart => Aliver; Qliver*Aart/Vart;
  J13: Aliver => Ametabolized; Clmetabolism*Aliver/Vliver/Kliver2pu;
  J8: Agut => Aliver; Qgut*Agut/Vgut*Rblood2plasma/Kgut2pu/Fraction_unbound_plasma;
  J9: Aliver => Aven; (Qliver + Qgut)*Aliver/Vliver*Rblood2plasma/Kliver2pu/Fraction_unbound_plasma;
  J10: Aart => Akidney; Qkidney*Aart/Vart;
  J11: Akidney => Atubules; Qgfr*Akidney/Vkidney/Kkidney2pu;
  J12: Akidney => Aven; Qkidney*Akidney/Vkidney*Rblood2plasma/Kkidney2pu/Fraction_unbound_plasma;
end
